// SBML level 2 version 4

model reduced_PBPK_model_brain_uptake()
  // reduced_PBPK_model_brain_uptake

  // Compartments:
  compartment Plasma = 1 MWBUILTINUNIT_liter;
  compartment BrainVasc = 1 MWBUILTINUNIT_liter;
  compartment TissueVasc = 1 MWBUILTINUNIT_liter;
  compartment Lymph = 1 MWBUILTINUNIT_liter;
  compartment BrainISF = 1 MWBUILTINUNIT_liter;
  compartment TissueEndo = 1 MWBUILTINUNIT_liter;
  compartment TissueISF = 1 MWBUILTINUNIT_liter;
  compartment SAS = 1 MWBUILTINUNIT_liter;
  compartment CM = 1 MWBUILTINUNIT_liter;
  compartment LV = 1 MWBUILTINUNIT_liter;
  compartment TFV = 1 MWBUILTINUNIT_liter;
  compartment Total_Brain = 1 MWBUILTINUNIT_liter;

  // Species:
  species Drug_P in Plasma = 0;  // substance in MWBUILTINPREFIX_nano_MWBUILTINUNIT_mole
  species Drug_BV in BrainVasc = 0;  // substance in MWBUILTINPREFIX_nano_MWBUILTINUNIT_mole
  species Drug_TV in TissueVasc = 0;  // substance in MWBUILTINPREFIX_nano_MWBUILTINUNIT_mole
  species Drug_L in Lymph = 0;  // substance in MWBUILTINPREFIX_nano_MWBUILTINUNIT_mole
  species Drug_BISF in BrainISF = 0;  // substance in MWBUILTINPREFIX_nano_MWBUILTINUNIT_mole
  substanceOnly species PtoISF in BrainISF = 0;  // substance in MWBUILTINPREFIX_nano_MWBUILTINUNIT_mole
  substanceOnly species CSFtoISF in BrainISF = 0;  // substance in MWBUILTINPREFIX_nano_MWBUILTINUNIT_mole
  species Drug_TE in TissueEndo = 0;  // substance in MWBUILTINPREFIX_nano_MWBUILTINUNIT_mole
  species FcRn_TE in TissueEndo = FcRn_ss;  // substance in MWBUILTINPREFIX_nano_MWBUILTINUNIT_mole
  species Drug_TE_FcRn in TissueEndo = 0;  // substance in MWBUILTINPREFIX_nano_MWBUILTINUNIT_mole
  species Drug_TISF in TissueISF = 0;  // substance in MWBUILTINPREFIX_nano_MWBUILTINUNIT_mole
  species Drug_SAS in SAS = 0;  // substance in MWBUILTINPREFIX_nano_MWBUILTINUNIT_mole
  substanceOnly species ISFtoSAS in SAS = 0;  // substance in MWBUILTINPREFIX_nano_MWBUILTINUNIT_mole
  species Drug_CM in CM = 0;  // substance in MWBUILTINPREFIX_nano_MWBUILTINUNIT_mole
  species Drug_LV in LV = 0;  // substance in MWBUILTINPREFIX_nano_MWBUILTINUNIT_mole
  substanceOnly species ISFtoLV in LV = 0;  // substance in MWBUILTINPREFIX_nano_MWBUILTINUNIT_mole
  substanceOnly species BVtoLV in LV = 0;  // substance in MWBUILTINPREFIX_nano_MWBUILTINUNIT_mole
  species Drug_TFV in TFV = 0;  // substance in MWBUILTINPREFIX_nano_MWBUILTINUNIT_mole
  substanceOnly species ISFtoTFV in TFV = 0;  // substance in MWBUILTINPREFIX_nano_MWBUILTINUNIT_mole
  substanceOnly species BVtoTFV in TFV = 0;  // substance in MWBUILTINPREFIX_nano_MWBUILTINUNIT_mole
  substanceOnly species BBBtoBrain in Total_Brain = 0;  // substance in MWBUILTINPREFIX_nano_MWBUILTINUNIT_mole
  substanceOnly species BCSFBtoBrain in Total_Brain = 0;  // substance in MWBUILTINPREFIX_nano_MWBUILTINUNIT_mole

  // Parameters:
  Qt = 1 MWDERIVEDUNIT_liter__hour;
  Lt = 1 MWDERIVEDUNIT_liter__hour;
  Lb = 1 MWDERIVEDUNIT_liter__hour;
  Qb = 1 MWDERIVEDUNIT_liter__hour;
  sigma_tv = 1 dimensionless;
  FR = 1 dimensionless;
  Koff_FcRn = 1 MWDERIVEDUNIT_1__hour;
  Kon_FcRn = 1 MWDERIVEDUNIT_1__nanomole__liter__hour;
  sigma_tl = 1 dimensionless;
  Qcsf = 1 MWDERIVEDUNIT_liter__hour;
  sigma_uptake_bcsfb = 1 dimensionless;
  Qisf = 1 MWDERIVEDUNIT_liter__hour;
  sigma_uptake_bbb = 1 dimensionless;
  CLupT has MWDERIVEDUNIT_liter__hour;
  Kdeg = 1 MWDERIVEDUNIT_1__hour;
  sigma_csf_isf = 1 dimensionless;
  sigma_isf = 1 dimensionless;
  sigma_csf = 1 dimensionless;
  kCLupT = 1 MWDERIVEDUNIT_1__hour;
  f_LV = 0.5 dimensionless;
  FcRn_ss = 1 MWDERIVEDUNIT_nanomole__liter;

  // Assignment rules:
  CLupT := kCLupT*TissueEndo;

  // Rate rules:
  ISFtoSAS' = Qisf*Drug_BISF;
  ISFtoLV' = f_LV*Qisf*Drug_BISF;
  ISFtoTFV' = (1 - f_LV)*Qisf*Drug_BISF;
  BVtoLV' = f_LV*Qcsf*Drug_BV;
  BVtoTFV' = (1 - f_LV)*Qcsf*Drug_BV;
  PtoISF' = (1 - sigma_uptake_bbb)*Qisf*Drug_BV;
  CSFtoISF' = (1 - sigma_csf_isf)*Qisf*Drug_SAS;
  BBBtoBrain' = (1 - sigma_uptake_bbb)*Qisf*Drug_BV;
  BCSFBtoBrain' = (1 - sigma_uptake_bcsfb)*Qcsf*Drug_BV;

  // Reactions:
  TissueRec: Drug_TV => Drug_P; (Qt - Lt)*Drug_TV;
  BrainRec: Drug_BV => Drug_P; (Qb - Lb)*Drug_BV;
  LymphRec: Drug_L => Drug_P; (Lt + Lb)*Drug_L;
  TissueDist: Drug_P => Drug_TV; Qt*Drug_P;
  BrainDist: Drug_P => Drug_BV; Qb*Drug_P;
  TissueExtrav: Drug_TV => Drug_TISF; (1 - sigma_tv)*Lt*Drug_TV;
  UptakeTEV: Drug_TV => Drug_TE; CLupT*Drug_TV;
  RecycleTE: Drug_TE_FcRn => Drug_TV + FcRn_TE; CLupT*FR*Drug_TE_FcRn;
  UptakeTEI: Drug_TISF => Drug_TE; CLupT*Drug_TISF;
  BindFcRnTE: Drug_TE + FcRn_TE => Drug_TE_FcRn; (Kon_FcRn*Drug_TE*FcRn_TE - Koff_FcRn*Drug_TE_FcRn)*TissueEndo;
  DegTE: Drug_TE => ; Kdeg*Drug_TE*TissueEndo;
  LymphDrain_T: Drug_TISF => Drug_L; (1 - sigma_tl)*Lt*Drug_TISF;
  TransTE: Drug_TE_FcRn => Drug_TISF + FcRn_TE; CLupT*(1 - FR)*Drug_TE_FcRn;
  UptakeCSF: Drug_BV => Drug_LV; f_LV*(1 - sigma_uptake_bcsfb)*Qcsf*Drug_BV;
  UptakeBISF: Drug_BV => Drug_BISF; (1 - sigma_uptake_bbb)*Qisf*Drug_BV;
  LymphDrain_ISF: Drug_BISF => Drug_L; (1 - sigma_isf)*Qisf*Drug_BISF;
  LymphDrain_CSF: Drug_SAS => Drug_L; (1 - sigma_csf)*Qcsf*Drug_SAS;
  Reaction_1: Drug_CM => Drug_SAS; (Qcsf + Qisf)*Drug_CM;
  Reaction_2: Drug_SAS => Drug_BISF; (1 - sigma_csf_isf)*Qisf*Drug_SAS;
  Reaction_3: Drug_BISF => Drug_LV; f_LV*(1 - sigma_csf_isf)*Qisf*Drug_BISF;
  Reaction_4: Drug_LV => Drug_TFV; f_LV*(Qcsf + Qisf)*Drug_LV;
  Reaction_5: Drug_BISF => Drug_TFV; (1 - f_LV)*(1 - sigma_csf_isf)*Qisf*Drug_BISF;
  Reaction_6: Drug_BV => Drug_TFV; (1 - f_LV)*(1 - sigma_uptake_bcsfb)*Qcsf*Drug_BV;
  Reaction_9: Drug_TFV => Drug_CM; (Qcsf + Qisf)*Drug_TFV;

  // Unit definitions:
  unit MWBUILTINUNIT_liter = metre^3 * 1e-3 dimensionless;
  unit MWBUILTINPREFIX_nano_MWBUILTINUNIT_mole = 1e-9 mole; MWBUILTINPREFIX_nano_MWBUILTINUNIT_mole is "nanomole";
  unit MWDERIVEDUNIT_liter__hour = metre^3 * 2.777778e-7 dimensionless / second; MWDERIVEDUNIT_liter__hour is "liter/hour";
  unit MWDERIVEDUNIT_1__hour = 2.777778e-4 dimensionless / second; MWDERIVEDUNIT_1__hour is "1/hour";
  unit MWDERIVEDUNIT_1__nanomole__liter__hour = metre^3 * 277.7778 dimensionless / (mole * second); MWDERIVEDUNIT_1__nanomole__liter__hour is "1/(nanomole/liter)/hour";
  unit MWDERIVEDUNIT_nanomole__liter = mole * 1e-6 dimensionless / metre^3; MWDERIVEDUNIT_nanomole__liter is "nanomole/liter";
end
